# 1 задание.
det([sin(15), e^π, tan(12); sqrt(18), log(5), cot(3); 2^0.8, nthroot(4, 5), acot(8)]) = -291.565
.
.
a := [5, 8, 1; 3, 2, 4; -3, 0, 5]
b := [-3, 1, 4; 5, -8, 1; 3, 2, 0]
|2.17*a - (3 + 5/8)*b| = 993.89
a*transpose(b) = [-3, -38, 31; 9, 3, 13; 29, -10, -9]
c := [cos(5), log(2, 3), nthroot(12, 5); tan(8), cot(3), 2^5; sin(11), ln(5), log(12)]
|c| = -61.8364
rank(c) = 3
rref(c) = [1, 0, 0; 0, 1, 0; 0, 0, 1]
a2 := [
    5, 1.45, 8, (2 + 5/8), 9, 10;
    15, 9, 5, 11, 16, 11;
    15, 8, 15, 15, cos(5), π;
    9, 55/41, 32, 10, 80, 99;
    -25, 5, 13, -8, log(25), -7;
    1, 0, 71, 15, 26, 67
]
b2 := [
    1, log(4), 8, (2 + 5/8), 9, ln(12);
    15, 9, 5, 11, 4, sqrt(50);
    15, 38, 5!, 15, cos(25), π;
    41, 55/41, 31, 0, 8, 9;
    -25, 3, 13, -8, log(25), -7;
    1, 5, 71, 15, 26, -6
]
c2 := [
    1, 0, 8, (2 + 5/8), 9, ln(10);
    15, 9, 5, 11, 0, log(17);
    11, (2 + 8/11), 8/7, 11^2, 1, π;
    15, 55/41, 21, 10, 15, 5;
    -25, 5, 23, -8, log(1), -7;
    1, 5, 0, 15, 11, 12
]
a2*b2 + transpose(c2) = [
    40.375, 415.582, 1926.62, 242.075, 327.311, -50.5647;
    287, 406.787, 2097.73, 251.716, 577.323, 42.6212;
    979.05, 692.712, 2652.88, 418.23, 406.946, 255.131;
    -979.253, 1992.91, 12418.7, 1373.38, 2875.92, -916.619;
    -115.949, 482.411, 659.173, 83.1915, -436.16, -14.7122;
    1100.3, 3132.95, 14091.1, 1869.62, 1970.72, -211.462
]
rank(a2*b2 + transpose(c2)) = 6
|a2*b2 + transpose(c2)| = -1.38446e14
1/(a2*b2 + transpose(c2)) = [
    -0.0249263, -0.0234342, 0.0311022, 0.0108557, 0.0101954, -0.00900297;
    -0.000838519, -0.0756261, 0.0909778, 0.0289124, 0.0277852, -0.0325357;
    -0.00897332, 0.0387431, -0.0425563, -0.0129405, -0.0106896, 0.0154468;
    0.0823215, -0.0954447, 0.0836285, 0.0215851, 0.00994452, -0.0322796;
    0.0062783, -0.0409174, 0.0485269, 0.0151766, 0.0128249, -0.0178784;
    0.0462741, 0.114131, -0.134437, -0.0451925, -0.0401705, 0.0437004
]
x := 1
z := 3
y := 2
h := 4
Given
10x - 8y + 11*z - 15h == -5
5x - 6y + 12*z + h == 12
14*y + 11*z + 5h == 14
13*x + 12*y + 11*z + 2h == 34
Find(x, y, z, h) =  # error: This variable is undefined.
