# Маслов Владислав Андреевич  1ПИб-02-1оп-22 | ВЫПОЛНЕНИЕ ДЕЙСТВИЙ НАД КОМПЛЕКСНЫМИ ЧИСЛАМИ В MATHCAD
# Вариант №10
# 1.
1/1i^15 + 1/1i^7 + 1/1i^3 = 3i
Re((5 + 4*1i)/(12 + 3*1i) + 22*(7 - 15*1i)/((22 + 4*1i) - (12 - 15*1i))) = -9.78972
2.
3.
Im(1/(17 + 5*1i) + 1/(23 - 10*1i)^9 - 1/1i^22) = -0.0159236
conj((12 - 3*1i)/((5 + 4*1i)*(-8 + 3*1i))) = -0.191447 - 0.120281i
4.
5.
z^8 - 16 == 0
[1 - 1i; -sqrt(2)*1i; -1 - 1i; -sqrt(2); -1 + 1i; sqrt(2)*1i; 1 + 1i; sqrt(2)] = [1 - 1i; -1.41421i; -1 - 1i; -1.41421; -1 + 1i; 1.41421i; 1 + 1i; 1.41421]
6.
z1 := 12 + 3*1i
|z1| = 12.3693
|z1| float, 5 → 12.369
arg(z1) = 0.244979
arg(z1) float, 3 → 0.245
z := r*(cos(ϕ) + 1i*sin(ϕ)) explicit, ϕ, r → r*(cos(ϕ) + 1i*sin(ϕ))  # error: This variable is undefined.
7.
z2 := -15 + 2*1i
|z2| = 15.1327
|z2| float, 5 → 15.133
arg(z2) = 3.00904
ϕ := arg(z2) float, 4 → 3.009
r*e^(i*ϕ) explicit, r, ϕ → r*e^(i*3.009)
8.
|15*(cos(22) + 1i*sin(22)) - 12*(cos(12) + 1i*sin(12))/(8*(cos(5) + 1i*sin(5)))| = 16.169
9.
arg(15*e^(33*1i)/(17*e^(-12*1i)) + 23*e^(77*1i) - (3*e^(2*1i))^12) = 2.00883
10.
z^7 == 5 - 6*1i
[
    61^(1/14)*cos(2*π/7 + atan(6/5)/7) - 61^(1/14)*sin(2*π/7 + atan(6/5)/7)*1i;
    -61^(1/14)*cos(atan(6/5)/7 - 3*π/7) + 61^(1/14)*sin(1/7*atan(6/5) - 3/7*π)*1i;
    -61^(1/14)*cos(atan(6/5)/7 - π/7) + 61^(1/14)*sin(1/7*atan(6/5) - 1/7*π)*1i;
    -61^(1/14)*cos(π/7 + atan(6/5)/7) + 61^(1/14)*sin(1/7*π + 1/7*atan(6/5))*1i;
    -61^(1/14)*cos(3*π/7 + atan(6/5)/7) + 61^(1/14)*sin(3/7*π + 1/7*atan(6/5))*1i;
    61^(1/14)*(sin(3*π/14 + atan(6/5)/7) - sin(atan(6/5)/7 - 2*π/7)*1i);
    61^(1/14)*cos(atan(6/5)/7) - 61^(1/14)*sin(atan(6/5)/7)*1i
] = [0.698842 - 1.14485i; -0.45936 - 1.26018i; -1.27165 - 0.426567i; -1.12637 + 0.728259i; -0.132903 + 1.33469i; 0.960641 + 0.936074i; 1.3308 - 0.167426i]
