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# Маслов Владислав Андреевич 1ПИб-02-1оп-22
# Вариант 1
# 1)
A := [3, 5, 8; 7, -9, 3]
B := [12, 8, 4; 5, -5, 11]
C := [12, 3; 4, 12; 9, 1]
# а)
A + B = [15, 13, 12; 12, -14, 14]
# б)
transpose(A) = [3, 7; 5, -9; 8, 3]
# в)
2.17*A - 3*5/8*B = [-15.99, -4.15, 9.86; 5.815, -10.155, -14.115]
# 2)
F := [12, -3, 4; 2, 13, 12; 2, -1, 10]
F^-1 = [
    0.0898734, 0.0164557, -0.0556962;
    0.00253165, 0.0708861, -0.0860759;
    -0.0177215, 0.00379747, 0.102532
]
|F| = 1580
F^2 = [146, -79, 52; 74, 151, 284; 42, -29, 96]
|2*F + transpose(F)| = 30204
# 3)
det([
    ln(π + π^2)^5, atan(1.4 - π), nthroot(tan(12)^4, 5);
    log(627, 15), 6^1.15 + (5 + 25/37), π^0.9;
    asin(0.2*e^-2), cos(sqrt(8.4*π)), 3 + 2^(-sqrt(0.5))
]) = 5314.72
# 4)
rank([0, 1, 0, 2, 0, 3; 5, 0, 4, 0, 0, 5; 8, 0, 0, 1, 4, 2; 0, 2, 0, 3, 5, 0]) = 4
# 5)
Given
2*x - 3*y + z == 6
x + 3*y - 4*z == -4
2*x + y + 5*z == 7
Find(x, y, z) → [113/72; -47/72; 65/72] = [1.56944; -0.652778; 0.902778]
# 6)
5*x + 8*y + z == 2
3*x - 2*y + 9*z == -7
4*x + y - z == -5
Δ := det([5, 8, 1; 3, 2, 9; 4, 1, -1])
Δx := det([2, 8, 1; -7, 2, 9; -5, 1, -1])
Δy := det([5, 2, 1; 3, -7, 9; 4, -5, -1])
Δz := det([5, 8, 2; 3, 2, -7; 4, 1, -5])
x := Δx/Δ
y := Δy/Δ
z := Δz/Δ
x = -1.72619
y = 1.39286
z = -0.511905
# 7)
A := [2, 5, 4; 7, 5, 2; 2, 10, 9]
B := [-2; -24; 1]
|A| = -5
A^-1 = [-5, 1, 2; 11.8, -2, -4.8; -12, 2, 5]
X := A^-1*B
X = [-12; 19.6; -19]
# 8)
A := [10, -8, 11; 5, -6, -6; -9, 0, 11]
B := [-5; -6; 14]
lsolve(A, B) = [-1.12199; -0.289727; 0.354735]
A := [10, -8, 11, -5; 5, -6, -6, -6; -9, 0, 11, 14]
rref(A) = [1, 0, 0, -1.12199; 0, 1, 0, -0.289727; 0, 0, 1, 0.354735]
