# Маслов Владислав Андреевич - 1ПИб-02-1оп-22
# Вариант №10
# 1. Найти производную первого порядка:
y(x) := sqrt(x - 1)*(3*x + 2)/(4*x^2)
d/dx(y(x)) → 3*sqrt(x - 1)/(4*x^2) + (3*x + 2)/(8*x^2*sqrt(x - 1)) - sqrt(x - 1)*(3*x + 2)/(2*x^3)
# 2. Найти производную второго порядка:
y(x) := e^(1 - 2*x)*sin(2 + 3*x)
d^2/dx^2(y(x)) → -12*e^(1 - 2*x)*cos(3*x + 2) - 5*e^(1 - 2*x)*sin(3*x + 2)
# 3. Найти значение y``(x) в точке x_0
y(x) := (x^5 + 1)/(x^4 + 1)
dy(x) := d^2/dx^2(y(x))
dy(1) = 2
# 4. Материальная точка движется по закону s(t)=12t^3-32t^2+216t-15 (м). Найти скорость и ускорение точки в момент времени t=4с.
S(t) := 12*t^3 - 32*t^2 + 216*t - 15
a(t) := d^2/dt^2(S(t)) → 72*t - 64
v(t) := d/dt(S(t)) → 36*t^2 - 64*t + 216
v(4) = 536
a(4) = 224
# 5. Найти момент времени, в который скорость точки будет равна 400 м/с.
v(t) == 400 solve, t → [sqrt(478)/9 + 8/9; 8/9 - sqrt(478)/9] = [3.31813; -1.54036]
# 6. Составить уравнение касательной и нормали к графику функции в точке x_0=1.
f(x) := 2*x^3 + 8*x^2 + 3*x - 12
f(1) = 1
df(x) := d/dx(f(x))
df(1) = 25
kas(x) := f(1) - df(1)*(x - 1) → 26 - 25*x
nor(x) := f(1) - (x - 1)/df(1) → 26/25 - x/25
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# 7. Составить уравнение наклонной асимптоты к графику функции:
f(x) := (4*x^3 - 8*x^2 + 8)/(8*x^2 - 48*x - 20)
k := limit(f(x)/x, x → ∞) → 1/2
b := limit(f(x) - k*x, x → ∞) → 2
# наклонная ассимптота
y(x) := k*x + b → x/2 + 2
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# 8. Найти наименьшее и наибольшее значение функции на заданном отрезке:
y(x) := 4*x^3 + 4*x^2 - 8*x + 4
xε(-1 .. 3)
dy(x) := d/dx(y(x)) → 12*x^2 + 8*x - 8
dy(x) == 0 solve, x → [sqrt(7)/3 - 1/3; -sqrt(7)/3 - 1/3] = [0.548584; -1.21525]
y(-1) = 12
y(0.549) = 1.47548
y(3) = 124
# наименьшее | наибольшее
