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# Маслов Владислав Андреевич
# 1ПИб-02-1оп-22
# Вариант 17
# 1)
f(x, y, z) := sin(x*y/1) - e^(16 + 3*x) + ln(z^8 + 24*y)
d/dx(f(x, y, z)) → y*cos(x*y) - 3*e^(3*x + 16)
d/dy(f(x, y, z)) → 24/(z^8 + 24*y) + x*cos(x*y)
d/dz(f(x, y, z)) → 8*z^7/(z^8 + 24*y)
df == (y*cos(x*y) - 3*e^(3*x + 16))*dx + (24/(z^8 + 24*y) + x*cos(x*y))*dy + (8*z^7/(z^8 + 24*y))*dz
# 2)
f(x, y, z) := z^3 + sin(8*x + y + 3*z)/(22*z)
d^3/dy^3(f(x, y, z)) → -cos(8*x + y + 3*z)/(22*z)
d/dx(d/dz(f(x, y, z))) → -4*cos(8*x + y + 3*z)/(11*z^2) - 12*sin(8*x + y + 3*z)/(11*z)
d^2/dx^2(d/dz(f(x, y, z))) → 32*sin(8*x + y + 3*z)/(11*z^2) - 96*cos(8*x + y + 3*z)/(11*z)
# 3)
integral(integral(3 + 8*y^3 + e^x, x = 6 .. 11), y = -6 .. 8) = 860800
# 4)
integral(integral(-2*cos(y + 6) - nthroot(8 + 6*x, 3), x = 5 .. 14), y = -2 .. 25) = -976.884
# 5)
# 6)
y1(x) := -3/2*x + 24
y2(x) := 15/22*x + 120/11
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