# Маслов Владислав Андреевич
1*ПИб - 02 - 01*оп - 22
# Лабораторная работа №1
# 1)
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# Вариант 3
a := 2^(-x) == 0.6 solve → 0.736965594166
b := 2^(-x) == 2.9 solve → -1.53605290024
s1 := integral(2^(-x) - 0.6, x = b .. a) = 1.95439
sRight := integral(2.9 - 0.6, x = a .. 1.8) = 2.44498
s := (1.8 + 1.7)*(2.9 - 0.6)
p := (sRight + s1)/s = 0.546505
# 2)
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s := (7 - 5)*(1 + 2) = 6
sblue := integral(tan(x)/(1 - x^2) + 2, x = 5 .. 7) = 4.0397
sred := integral(ln(cos(x)) + 2, x = 5 .. 7) = 3.49366
sbetween := sblue - sred = 0.546049
pblue := sblue/s = 0.673284
pred := sred/s = 0.582276
pbetween := sbetween/s = 0.0910081
sTop := s - sblue = 1.9603
pTop := sTop/s = 0.326716
pred + pbetween + pTop = 1
# 3)
0 ≤ x ≤ 1
0 ≤ y ≤ 1
x + y ≤ 1
xy ≥ 0.09
f(x) := 1 - x
g(x) := 0.09/x
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1 - x == 0.09/x solve → [0.1; 0.9]
sblue := integral(0.09/x, x = 0.1 .. 0.9)
sred := integral(1 - x, x = 0.1 .. 0.9)
p := (sred - sblue)/1
# 4)
n := 14
p := 0.69
m := 0 .. n
q := 1 - p = 0.31
n!*(1 - p)^(n - m)/((n - m)!*m!)*p^m = [7.56944e-8; 2.35873e-6; 3.41256e-5; 0.000303828; 0.00185972; 0.00827875; 0.0276403; 0.0703109; 0.136936; 0.203196; 0.226137; 0.183032; 0.101848; 0.0348761; 0.00554482]
m = [0; 1; 2; 3; 4; 5; 6; 7; 8; 9; 10; 11; 12; 13; 14]
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